// SBML level 3 version 2
// Created with https://github.com/matthiaskoenig/sbmlutils.

model simvastatin_intestine(CYP3A4_Km, SIMVA_CYP3A4LI_Vmax, Vext, Vgu, Vlumen, Vfeces, simva_lumen, simva, simva_ext, simmets_lumen, simmets, simmets_ext, simmets_feces)
  // Model for intestinal/gut simvastatin metabolism
  // Simvastatin is taken up via absorption and appears within the enterocytes. Complete absorption is assumed.
  // Simvastatin metabolites are taken up via absorption and appears within the enterocytes. Incomplete absorption is assumed and non-absorbed metabolites are excreted in the feces (only simvastatin metabolites are found in feces).
  // Simvastatin can be converted to simvastatin metabolites by CYP3A4 (first pass metabolism).
  // The possible conversion simvastatin -> simvastatin acid (esterases) and simvastatin acid -> simvastatin metabolites are assumed to mainly take place in the liver, and are not modeled in the intestine.
  // Simvastatin and simvastatin metabolites are transported irreversible from the enterocytes in the gut plasma.
  // The content of this model has been carefully created in a manual research effort.
  // Terms of use
  // Copyright © 2023 Matthias König.
  // This work is licensed under a Creative Commons Attribution 4.0 International License.
  // Redistribution and use of any part of this model, with or without modification, are permitted provided that the following conditions are met:
  // Redistributions of this SBML file must retain the above copyright notice, this list of conditions and the following disclaimer.
  // Redistributions in a different form must reproduce the above copyright notice, this list of conditions and the following disclaimer in the documentation and/or other materials provided with the distribution.
  // This model is distributed in the hope that it will be useful, but WITHOUT ANY WARRANTY; without even the implied warranty of MERCHANTABILITY or FITNESS FOR A PARTICULAR PURPOSE.
  // model units - substance: mmole, time: min, volume: litre, area: m2, length: metre, extent: mmole

  // Compartments:
  compartment Vext = 1 litre; Vext is "plasma";  // SBO:0000290 ncit:C13356 BTO:0000131
  compartment Vgu = 1.2825 litre; Vgu is "intestine";  // SBO:0000290 FMA:45615 BTO:0000545 ncit:C12736
  compartment Vlumen = 1.15425 litre; Vlumen is "intestinal lumen (inner part of intestine)";  // SBO:0000290 FMA:14586 UBERON:0018543
  compartment Vfeces = 1 litre;  // SBO:0000290 FMA:64183 ncit:C13234 BTO:0000440
  compartment Ventero = NaN; Ventero has litre; Ventero is "intestinal lining (enterocytes)";  // SBO:0000290
  compartment Vapical = NaN; Vapical has m2; Vapical is "apical membrane (intestinal membrane enterocytes)";  // 2-D; SBO:0000290 FMA:84666 GO:0016324
  compartment Vbaso = NaN; Vbaso has m2; Vbaso is "basolateral membrane (intestinal membrane enterocytes)";  // 2-D; SBO:0000290 FMA:84669 GO:0016323

  // Species:
  species simva_lumen in Vlumen = 0; simva_lumen is "simvastatin (intestinal lumen)";  // SBO:0000247 ncit:C29454 CHEBI:9150 omit:0019802
  species simva in Vgu = 0; simva is "simvastatin (enterocytes)";  // SBO:0000247 ncit:C29454 CHEBI:9150 omit:0019802
  species simva_ext in Vext = 0; simva_ext is "simvastatin (plasma)";  // SBO:0000247 ncit:C29454 CHEBI:9150 omit:0019802
  species simmets_lumen in Vlumen = 0; simmets_lumen is "simvastatin metabolites (intestinal lumen)";  // SBO:0000247
  species simmets in Vgu = 0; simmets is "simvastatin metabolites (intestine)";  // SBO:0000247
  species simmets_ext in Vext = 0; simmets_ext is "simvastatin metabolites (blood)";  // SBO:0000247
  substanceOnly species simmets_feces in Vfeces = 0; simmets_feces is "simvastatin metabolites (feces)";  // SBO:0000247

  // Parameters:
  // Fraction absorbed, i.e., only a fraction of the simvastatin in the intestinal lumen is absorbed. Due to total absorption no simvastatin reaches the feces. (~60% Cheng1993, ~61-85% Vickers1990a, probably bioavailability).
  // Model structure only works for complete absorption, i.e., F=1.0. Otherwise extension with fecal excretion required.
  F_abs_simva = 1 dimensionless; F_abs_simva is "fraction absorbed simvastatin";  // SBO:0000002
  // Fraction absorbed, i.e., only a fraction of the simvastatin metabolites in the intestinal lumen is absorbed. This parameter determines how much of the simvastatin metabolites is excreted in every round of the enterohepatic circulation.
  // F_abs_simmets of dose is absorbed. (1-F_abs_simmets) is excreted in feces.
  F_abs_simmets = 0.2690586 dimensionless; F_abs_simmets is "fraction absorbed simvastatin metabolites";  // SBO:0000002
  SIMVAABS_k = 1.508801 per_hr; SIMVAABS_k is "rate of absorption simvastatin";  // SBO:0000002
  SIMMETSABS_k = 0.02245305 per_hr; SIMMETSABS_k is "rate of absorption simvastatin metabolites";  // SBO:0000002
  CYP3A4_Km = 0.025 mM; CYP3A4_Km is "Km CYP3A4";  // SBO:0000322
  SIMVA_CYP3A4LI_Vmax = 1 mmole_per_min_l; SIMVA_CYP3A4LI_Vmax is "Vmax CYP3A4";  // SBO:0000186
  // assumptions
  // identical metabolism in liver and intestine
  SIMVA_CYP3A4_f = 0.001025798 dimensionless; SIMVA_CYP3A4_f is "scaling of intestinal Vmax CYP3A4 relative to liver";  // SBO:0000002
  // Assuming identical Km then OATP1B1 in liver for simvastatin lactone 9.7 µM (Chen et al., 2005)
  SIMVAEXP_Km = 0.0097 mM; SIMVAEXP_Km is "Km simvastatin export";  // SBO:0000322
  SIMVAEXP_f = 10.96271 dimensionless; SIMVAEXP_f is "scaling simvastatin export";  // SBO:0000002
  SIMMETSEXP_Km = 0.0067 mM; SIMMETSEXP_Km is "Km simvastatin metabolite export";  // SBO:0000322
  SIMMETSEXP_f = 29.27591 dimensionless; SIMMETSEXP_f is "scaling simvastatin metabolite export";  // SBO:0000002
  absorption_simmets has mmole_per_min; absorption_simmets is "absorption simvastatin metabolites";
  SIMVA_CYP3A4GU_Vmax has mmole_per_min_l; SIMVA_CYP3A4GU_Vmax is "Vmax for CYP3A4 metabolism";

  // Assignment rules:
  absorption_simmets := SIMMETSABS_k/(60 min_per_hr)*Vgu*simmets_lumen;
  SIMVA_CYP3A4GU_Vmax := SIMVA_CYP3A4LI_Vmax*SIMVA_CYP3A4_f;

  // Reactions:
  SIMVAABS: simva_lumen => simva; F_abs_simva*SIMVAABS_k/(60 min_per_hr)*Vgu*simva_lumen; SIMVAABS is "absorption simvastatin";  // SBO:0000655
  SIMMETSABS: simmets_lumen => simmets; F_abs_simmets*absorption_simmets; SIMMETSABS is "absorption simvastatin metabolites";  // SBO:0000655
  SIMMETSEXC: simmets_lumen => simmets_feces; (1 - F_abs_simmets)*absorption_simmets; SIMMETSEXC is "excretion simvastatin metabolites";  // SBO:0000655
  SIMVAEXP: simva => simva_ext; Vgu*SIMVA_CYP3A4GU_Vmax*SIMVAEXP_f*simva/(SIMVAEXP_Km + simva); SIMVAEXP is "SV export";  // SBO:0000655
  // assuming identical Km then OATP1B1 in liver Simvastatin acid 3.6 µM (Nakai et al., 2001; Chen et al., 2005) Simvastatin lactone 9.7 µM (Chen et al., 2005)
  SIMMETSEXP: simmets => simmets_ext; Vgu*SIMVA_CYP3A4GU_Vmax*SIMMETSEXP_f*simmets/(simmets + SIMMETSEXP_Km); SIMMETSEXP is "SVM export";  // SBO:0000655
  // CYP3A4: identical Km for simvastatin and simvastatin acid assumed
  SIMVA_CYP3A4: simva => simmets; Vgu*SIMVA_CYP3A4GU_Vmax*simva/(simva + CYP3A4_Km); SIMVA_CYP3A4 is "CYP3A4: SV to SVM";  // SBO:0000176

  // Unit definitions:
  unit g_per_mole = gram / mole; g_per_mole is "g/mole";
  unit kg = 1000 gram; kg is "kilogram";
  unit l_per_min = litre / (60 second); l_per_min is "l/min";
  unit l_per_min_kg = litre / (60 second * 1000 gram); l_per_min_kg is "l/min/kg";
  unit l_per_min_mmole = litre / (60 second * 1e-3 mole); l_per_min_mmole is "l/min/mmole";
  unit m2 = metre^2; m2 is "meter^2";
  unit mM = 1e-3 mole / litre; mM is "mmole/liter";
  unit mg = 1e-3 gram;
  unit min = 60 second;
  unit min_per_hr = 60 second / (3600 second); min_per_hr is "min/hr";
  unit mmole = 1e-3 mole;
  unit mmole_per_min = 1e-3 mole / (60 second); mmole_per_min is "mmole/min";
  unit mmole_per_min_l = 1e-3 mole / (60 second * litre); mmole_per_min_l is "mmole/min/liter";
  unit per_hr = 1 / (3600 second); per_hr is "1/hr";
  unit per_min = 1 / (60 second); per_min is "1/min";
  unit per_min_l = 1 / (60 second * litre); per_min_l is "1/min/liter";
end
