// SBML level 3 version 2
// Created with https://github.com/matthiaskoenig/sbmlutils.

model simvastatin_liver_simvastatin(CYP3A4_Km, SIMVA_CYP3A4LI_Vmax, Vext, Vli, Vlumen, simva_ext, simacid_ext, simmets_ext, simmets_lumen)
  // Model for simvastatin metabolism in the liver
  // The content of this model has been carefully created in a manual research effort.
  // Terms of use
  // Copyright © 2023 Matthias König.
  // This work is licensed under a Creative Commons Attribution 4.0 International License.
  // Redistribution and use of any part of this model, with or without modification, are permitted provided that the following conditions are met:
  // Redistributions of this SBML file must retain the above copyright notice, this list of conditions and the following disclaimer.
  // Redistributions in a different form must reproduce the above copyright notice, this list of conditions and the following disclaimer in the documentation and/or other materials provided with the distribution.
  // This model is distributed in the hope that it will be useful, but WITHOUT ANY WARRANTY; without even the implied warranty of MERCHANTABILITY or FITNESS FOR A PARTICULAR PURPOSE.
  // model units - substance: mmole, time: min, volume: litre, area: m2, length: metre, extent: mmole

  // Compartments:
  compartment Vext = 1 litre; Vext is "plasma";  // SBO:0000290 ncit:C13356 BTO:0000131
  compartment Vbaso = 1 m2; Vbaso is "basolateral membrane";  // 2-D; SBO:0000290 FMA:84669 GO:0016323
  compartment Vapical = NaN; Vapical has m2; Vapical is "apical membrane";  // 2-D; SBO:0000290 FMA:84666 GO:0016324
  compartment Vli = 1.5 litre; Vli is "liver";  // SBO:0000290 FMA:7197 BTO:0000759 ncit:C12392
  compartment Vlumen = 1.15425 litre; Vlumen is "intestinal lumen (inner part of intestine)";  // SBO:0000290 FMA:14586 UBERON:0018543

  // Species:
  species simacid in Vli = 0; simacid is "simvastatin acid (liver)";  // SBO:0000247 ncit:C96309 pubchem.substance:64718 inchikey:XWLXKKNPFMNSFA-HGQWONQESA-N
  species simmets in Vli = 0; simmets is "simvastatin metabolites (liver)";  // SBO:0000247
  species $simva_ext in Vext = 0; simva_ext is "simvastatin (plasma)";  // SBO:0000247 ncit:C29454 CHEBI:9150 omit:0019802
  species simacid_ext in Vext = 0; simacid_ext is "simvastatin acid (plasma)";  // SBO:0000247 ncit:C96309 pubchem.substance:64718 inchikey:XWLXKKNPFMNSFA-HGQWONQESA-N
  species simmets_ext in Vext = 0; simmets_ext is "simvastatin metabolites (plasma)";  // SBO:0000247
  species simva in Vli = 0; simva is "simvastatin (liver)";  // SBO:0000247 ncit:C29454 CHEBI:9150 omit:0019802
  species simmets_lumen in Vlumen = 0; simmets_lumen is "simvastatin metabolites (intestinal lumen)";  // SBO:0000247

  // Parameters:
  CYP3A4_Km = 0.025 mM; CYP3A4_Km is "Km CYP3A4";  // SBO:0000322
  SIMVA_CYP3A4LI_Vmax = 1 mmole_per_min_l; SIMVA_CYP3A4LI_Vmax is "Vmax CYP3A4";  // SBO:0000186
  SIMVAIMP_Km = 0.0097 mM; SIMVAIMP_Km is "Km for simvastatin import";  // SBO:0000322
  SIMVAIMP_f = 3.282931 dimensionless; SIMVAIMP_f is "scaling for simvastatin import";  // SBO:0000002
  // Km for simvastatin acid 3.6 µM (Chen et al., 2005)
  SIMACIDIMP_Km = 0.0036 mM; SIMACIDIMP_Km is "Km for simvastatin acid import";  // SBO:0000322
  SIMACIDIMP_f = 0.008135733 dimensionless; SIMACIDIMP_f is "scaling for simvastatin acid import";  // SBO:0000002
  // Assuming similar transport Km then simva and simacid via OATP1B1. Simvastatin acid 3.6 µM (Nakai et al., 2001; Chen et al., 2005). Simvastatin lactone 9.7 µM (Chen et al., 2005).
  SIMMETSIMP_Km = 0.0067 mM; SIMMETSIMP_Km is "Km for simvastatin metabolites import";  // SBO:0000322
  SIMMETSIMP_f = 21.572 dimensionless; SIMMETSIMP_f is "scaling for simvastatin metabolites import";  // SBO:0000002
  ESTERASE_Km = 0.0008 mM; ESTERASE_Km is "Km esterase";  // SBO:0000322
  ESTERASE_f = 0.1696492 dimensionless; ESTERASE_f is "scaling esterase";  // SBO:0000002
  SIMACID_CYP3A4_f = 4.712206 dimensionless; SIMACID_CYP3A4_f is "scaling of simacid conversion relative to simva";  // SBO:0000002
  EHC_simmets_k = 3.113771 per_min; EHC_simmets_k is "rate of EHC for simvastatin metabolites";  // SBO:0000009

  // Reactions:
  SIMVAIMP: $simva_ext -> simva; Vli*SIMVA_CYP3A4LI_Vmax*SIMVAIMP_f/SIMVAIMP_Km*(simva_ext - simva)/(1 + simva_ext/SIMVAIMP_Km + simva/SIMVAIMP_Km); SIMVAIMP is "SV import";  // SBO:0000655
  SIMACIDIMP: simacid -> simacid_ext; Vli*SIMVA_CYP3A4LI_Vmax*SIMACIDIMP_f/SIMACIDIMP_Km*(simacid - simacid_ext)/(1 + simacid_ext/SIMACIDIMP_Km + simacid/SIMACIDIMP_Km); SIMACIDIMP is "SVA export (OATP1B1)";  // SBO:0000655
  SIMMETSIMP: simmets -> simmets_ext; Vli*SIMVA_CYP3A4LI_Vmax*SIMMETSIMP_f/SIMMETSIMP_Km*(simmets - simmets_ext)/(1 + simmets_ext/SIMMETSIMP_Km + simmets/SIMMETSIMP_Km); SIMMETSIMP is "SVM export (OATP1B1)";  // SBO:0000655
  // [Fukami2010] Ki, 0.8 +- 0.1 (human liver microsomes)
  ESTERASE: simva => simacid; Vli*SIMVA_CYP3A4LI_Vmax*ESTERASE_f*simva/(simva + ESTERASE_Km); ESTERASE is "Esterase: SV to SVA";  // SBO:0000176
  SIMVA_CYP3A4: simva => simmets; Vli*SIMVA_CYP3A4LI_Vmax*simva/(simva + CYP3A4_Km); SIMVA_CYP3A4 is "CYP3A4: SV to SVM";  // SBO:0000176
  SIMACID_CYP3A4: simacid => simmets; Vli*SIMVA_CYP3A4LI_Vmax*SIMACID_CYP3A4_f*simacid/(simacid + CYP3A4_Km); SIMACID_CYP3A4 is "CYP3A4: SVA to SVM";  // SBO:0000176
  EHC_simmets: simmets => simmets_lumen; EHC_simmets_k*Vli*simmets; EHC_simmets is "EHC SVM";  // SBO:0000655

  // Unit definitions:
  unit g_per_mole = gram / mole; g_per_mole is "g/mole";
  unit kg = 1000 gram; kg is "kilogram";
  unit l_per_min = litre / (60 second); l_per_min is "l/min";
  unit l_per_min_kg = litre / (60 second * 1000 gram); l_per_min_kg is "l/min/kg";
  unit l_per_min_mmole = litre / (60 second * 1e-3 mole); l_per_min_mmole is "l/min/mmole";
  unit m2 = metre^2; m2 is "meter^2";
  unit mM = 1e-3 mole / litre; mM is "mmole/liter";
  unit mg = 1e-3 gram;
  unit min = 60 second;
  unit min_per_hr = 60 second / (3600 second); min_per_hr is "min/hr";
  unit mmole = 1e-3 mole;
  unit mmole_per_min = 1e-3 mole / (60 second); mmole_per_min is "mmole/min";
  unit mmole_per_min_l = 1e-3 mole / (60 second * litre); mmole_per_min_l is "mmole/min/liter";
  unit per_hr = 1 / (3600 second); per_hr is "1/hr";
  unit per_min = 1 / (60 second); per_min is "1/min";
  unit per_min_l = 1 / (60 second * litre); per_min_l is "1/min/liter";
end
